# OpenSim document version 40000
InverseKinematicsTool:
  results_directory: ./
  constraint_weight: Inf
  accuracy: 1e-5
  marker_file: ../TRC_File/test_20210322_squat.trc
  time_range: 0 19.99
  report_errors: true
  output_motion_file: test_20210322_squat.mot
  report_marker_locations: false
  IKTaskSet:
    IKMarkerTask Sternum: apply=true weight=1
    IKMarkerTask R.Acromium: apply=true weight=1
    IKMarkerTask L.Acromium: apply=true weight=1
    IKMarkerTask R.ASIS: apply=true weight=100
    IKMarkerTask L.ASIS: apply=true weight=100
    IKMarkerTask V.Sacral: apply=true weight=100
    IKMarkerTask R.Thigh.Upper: apply=true weight=1
    IKMarkerTask R.Thigh.Front: apply=true weight=1
    IKMarkerTask R.Thigh.Rear: apply=true weight=1
    IKMarkerTask R.Knee.Lat: apply=true weight=1
    IKMarkerTask R.Knee.Med: apply=true weight=1
    IKMarkerTask R.Shank.Upper: apply=true weight=1
    IKMarkerTask R.Shank.Front: apply=true weight=1
    IKMarkerTask R.Shank.Rear: apply=true weight=1
    IKMarkerTask R.Ankle.Lat: apply=true weight=1
    IKMarkerTask R.Ankle.Med: apply=true weight=1
    IKMarkerTask R.Heel: apply=true weight=1
    IKMarkerTask R.Toe.Lat: apply=true weight=1
    IKMarkerTask R.Toe.Med: apply=true weight=1
    IKMarkerTask R.Toe.Tip: apply=true weight=1
    IKMarkerTask L.Thigh.Upper: apply=true weight=1
    IKMarkerTask L.Thigh.Front: apply=true weight=1
    IKMarkerTask L.Thigh.Rear: apply=true weight=1
    IKMarkerTask L.Knee.Lat: apply=true weight=1
    IKMarkerTask L.Knee.Med: apply=true weight=1
    IKMarkerTask L.Shank.Upper: apply=true weight=1
    IKMarkerTask L.Shank.Front: apply=true weight=1
    IKMarkerTask L.Shank.Rear: apply=true weight=1
    IKMarkerTask L.Ankle.Lat: apply=true weight=1
    IKMarkerTask L.Ankle.Med: apply=true weight=1
    IKMarkerTask L.Heel: apply=true weight=1
    IKMarkerTask L.Toe.Lat: apply=true weight=1
    IKMarkerTask L.Toe.Med: apply=true weight=1
    IKMarkerTask L.Toe.Tip: apply=true weight=1
    IKMarkerTask R.Arm: apply=true weight=1
    IKMarkerTask L.Arm: apply=true weight=1
    IKMarkerTask R.Hand: apply=true weight=1
    IKMarkerTask L.Hand: apply=true weight=1
