# OpenSim document version 40000
ScaleTool LX_scale_1:
  mass: 53.5 [kg]
  height: -1
  age: -1
  GenericModelMaker:
    model_file: Scaled/Model_g30p1.osim
  ModelScaler:
    apply: true
    scaling_order: measurements manualScale
    marker_file: TRC_File/test_20210322_static.trc
    time_range: 1 2
    preserve_mass_distribution: true
    MeasurementSet:
      Measurement pelvis: apply=true
        MarkerPair: markers=(R.ASIS L.ASIS)
        BodyScale pelvis: axes=(X Y Z)
      Measurement thigh: apply=true
        MarkerPair: markers=(R.ASIS R.Knee.Lat)
        MarkerPair: markers=(L.ASIS L.Knee.Lat)
        BodyScale femur_r: axes=(X Y Z)
        BodyScale patella_r: axes=(X Y Z)
        BodyScale femur_l: axes=(X Y Z)
        BodyScale patella_l: axes=(X Y Z)
      Measurement shank: apply=true
        MarkerPair: markers=(R.Knee.Lat R.Ankle.Lat)
        MarkerPair: markers=(L.Knee.Lat L.Ankle.Lat)
        BodyScale tibia_r: axes=(X Y Z)
        BodyScale talus_r: axes=(X Y Z)
        BodyScale tibia_l: axes=(X Y Z)
        BodyScale talus_l: axes=(X Y Z)
      Measurement upper_arm: apply=true
        MarkerPair: markers=(R.Acromium R.Arm)
        MarkerPair: markers=(L.Acromium L.Arm)
        BodyScale humerus_r: axes=(X Y Z)
        BodyScale humerus_l: axes=(X Y Z)
      Measurement lower_arm: apply=true
        MarkerPair: markers=(R.Arm R.Hand)
        MarkerPair: markers=(L.Arm L.Hand)
        BodyScale ulna_r: axes=(X Y Z)
        BodyScale radius_r: axes=(X Y Z)
        BodyScale ulna_l: axes=(X Y Z)
        BodyScale radius_l: axes=(X Y Z)
      Measurement foot: apply=true
        MarkerPair: markers=(R.Toe.Tip R.Heel)
        MarkerPair: markers=(L.Toe.Tip L.Heel)
        BodyScale calcn_r: axes=(X Y Z)
        BodyScale toes_r: axes=(X Y Z)
        BodyScale calcn_l: axes=(X Y Z)
        BodyScale toes_l: axes=(X Y Z)
      Measurement toe: apply=false
        MarkerPair: markers=(R.Toe.Tip R.Toe.Med)
        MarkerPair: markers=(L.Toe.Tip L.Toe.Med)
      Measurement torso: apply=true
        MarkerPair: markers=(R.Acromium R.ASIS)
        MarkerPair: markers=(L.Acromium L.ASIS)
        BodyScale torso: axes=(X Y Z)
    ScaleSet:
      Scale: scales=(1 1 1) segment=hand_r apply=true
      Scale: scales=(1 1 1) segment=hand_l apply=true
  MarkerPlacer:
    apply: true
    marker_file: TRC_File/test_20210322_static.trc
    time_range: 1 2
    output_model_file: Scaled/ScaledModel_g30p1.osim
    max_marker_movement: -1
    IKTaskSet:
      IKMarkerTask Sternum: apply=true weight=1
      IKMarkerTask R.Acromium: apply=true weight=1000
      IKMarkerTask L.Acromium: apply=true weight=1000
      IKMarkerTask R.ASIS: apply=true weight=1000
      IKMarkerTask L.ASIS: apply=true weight=1000
      IKMarkerTask V.Sacral: apply=true weight=1
      IKMarkerTask R.Thigh.Upper: apply=true weight=1
      IKMarkerTask R.Thigh.Front: apply=true weight=1
      IKMarkerTask R.Thigh.Rear: apply=true weight=1
      IKMarkerTask R.Knee.Lat: apply=true weight=1000
      IKMarkerTask R.Knee.Med: apply=true weight=1000
      IKMarkerTask R.Shank.Upper: apply=true weight=1
      IKMarkerTask R.Shank.Front: apply=true weight=1
      IKMarkerTask R.Shank.Rear: apply=true weight=1
      IKMarkerTask R.Ankle.Lat: apply=true weight=1000
      IKMarkerTask R.Ankle.Med: apply=true weight=1000
      IKMarkerTask R.Heel: apply=true weight=1000
      IKMarkerTask R.Toe.Lat: apply=true weight=1
      IKMarkerTask R.Toe.Med: apply=true weight=1
      IKMarkerTask R.Toe.Tip: apply=true weight=1000
      IKMarkerTask L.Thigh.Upper: apply=true weight=1
      IKMarkerTask L.Thigh.Front: apply=true weight=1
      IKMarkerTask L.Thigh.Rear: apply=true weight=1
      IKMarkerTask L.Knee.Lat: apply=true weight=1000
      IKMarkerTask L.Knee.Med: apply=true weight=1000
      IKMarkerTask L.Shank.Upper: apply=true weight=1
      IKMarkerTask L.Shank.Front: apply=true weight=1
      IKMarkerTask L.Shank.Rear: apply=true weight=1
      IKMarkerTask L.Ankle.Lat: apply=true weight=1000
      IKMarkerTask L.Ankle.Med: apply=true weight=1000
      IKMarkerTask L.Heel: apply=true weight=1000
      IKMarkerTask L.Toe.Lat: apply=true weight=1
      IKMarkerTask L.Toe.Med: apply=true weight=1
      IKMarkerTask L.Toe.Tip: apply=true weight=1000
      IKMarkerTask R.Arm: apply=true weight=1000
      IKMarkerTask L.Arm: apply=true weight=1000
      IKMarkerTask R.Hand: apply=true weight=1000
      IKMarkerTask L.Hand: apply=true weight=1000
